// SBML level 2 version 4

model id_8w72()

  // Compartments:
  compartment id_txht = 1;

  // Species:
  species id_bya5 in id_txht = 500/id_txht;
  species id_eyok in id_txht = 0;
  species $id_i3vs in id_txht = 100/id_txht;
  species $id_nmyo in id_txht = 50/id_txht;
  species id_346h in id_txht = 0;

  // Reactions:
  R1_Substrate_Inhibition: id_bya5 -> id_eyok; id_i3vs*(kcatf1*id_bya5 - kcatr1*id_eyok)/(1 + id_bya5/Km1 + id_bya5*id_bya5/(Km1*Ksi1));  // modifiers: id_i3vs
    kcatf1 = 3e-5; kcatr1 = 0.000263; Km1 = 50; Ksi1 = 150;
  R2_Substrate_Inhibition: id_bya5 -> id_346h; id_nmyo*(kcatf2*id_bya5 - kcatr2*id_346h)/(1 + id_bya5/Km2 + id_bya5*id_bya5/(Km2*Ksi2));  // modifiers: id_nmyo
    kcatf2 = 3e-5; kcatr2 = 0.00101; Km2 = 200; Ksi2 = 800;

  // Unit definitions:
  unit id_hd31 = 1e-9 mole;
end
