// SBML level 2 version 4

model id_8w72()

  // Compartments:
  compartment id_txht = 1;

  // Species:
  species id_bya5 in id_txht = 500/id_txht;
  species id_eyok in id_txht = 0;
  species $id_i3vs in id_txht = 100/id_txht;
  species $id_nmyo in id_txht = 50/id_txht;
  species id_346h in id_txht = 0;

  // Parameters:
  id_ce7p = 0.084;
  id_74eb = 50;
  id_cgff = 15;
  id_zyvt = 78;
  id_ns7s = 0.01;
  id_112x = 500;
  id_23x3 = 0.06;
  id_pou5 = 22;
  id_ljxy = 18;

  // Reactions:
  id_t6wg: id_eyok => id_346h; id_txht*(id_ce7p*id_i3vs*id_eyok/id_pou5/(1 + id_eyok/id_pou5 + id_346h/id_ljxy + id_bya5/id_zyvt));  // modifiers: id_i3vs, id_bya5
  id_w2g9: id_346h => id_eyok; id_txht*(id_cgff*id_nmyo*id_346h/id_112x/(1 + id_bya5/id_74eb + id_346h/id_112x));  // modifiers: id_nmyo, id_bya5
  id_jz2i: id_346h => id_bya5; id_txht*(id_23x3*id_i3vs*id_346h/id_ljxy/(1 + id_eyok/id_pou5 + id_346h/id_ljxy + id_bya5/id_zyvt));  // modifiers: id_i3vs, id_eyok
  id_zco3: id_bya5 => id_346h; id_txht*(id_ns7s*id_nmyo*id_bya5/id_74eb/(1 + id_bya5/id_74eb + id_346h/id_112x));  // modifiers: id_nmyo

  // Unit definitions:
  unit id_hd31 = 1e-9 mole;
end
