// SBML level 2 version 1

model id_uxiu()

  // Compartments:
  compartment id_akl9 = 1;

  // Species:
  species id_mvl4 in id_akl9 = 0;
  species id_dpcy in id_akl9 = 10/id_akl9;
  species id_thh2 in id_akl9 = 0;
  species id_5qqo in id_akl9 = 200/id_akl9;
  species id_0wnr in id_akl9 = 0;
  species id_3u0u in id_akl9 = 0.9/id_akl9;
  species id_kbri in id_akl9 = 30/id_akl9;
  species id_0338 in id_akl9 = 0;
  species $id_29af in id_akl9 = 0;
  species id_xesb in id_akl9 = 0;
  species id_1sty in id_akl9 = 6/id_akl9;
  species id_k4hs in id_akl9 = 0;

  // Parameters:
  id_4mb1 = 0.1;
  id_3y6k = 0.1;
  id_kedp = 0.8;
  id_2xy5 = 0.2;
  id_eabx = 0.1;
  id_u5k1 = 50;
  id_wmo5 = 1;
  id_z2o5 = 1;
  id_2klh = 0.1;
  id_d7ie = 30;
  id_sd1v = 1;
  id_j382 = 0;

  // Reactions:
  id_up2t: => id_kbri; id_akl9*(id_u5k1/(1 + id_k4hs^3));  // modifiers: id_k4hs
  id_fkft: id_3u0u + $id_29af => id_xesb; id_eabx*id_3u0u*id_29af*id_akl9;
  id_rw19: id_mvl4 => id_0338; id_akl9*id_4mb1*id_mvl4;
  id_5qj4: id_thh2 => id_k4hs; id_thh2*id_sd1v*id_3u0u*id_akl9;  // modifiers: id_3u0u
  id_p7x7: id_5qqo => id_thh2; id_5qqo*id_2xy5*id_0wnr*id_akl9;  // modifiers: id_0wnr
  id_ykd9: id_0wnr => id_1sty; id_kedp*id_0wnr*id_akl9;
  id_splc: id_k4hs => ; id_z2o5*id_k4hs*id_akl9;
  id_bbfi: id_1sty => id_0wnr; id_1sty*id_3y6k*id_mvl4*id_akl9;  // modifiers: id_mvl4
  id_6smm: id_dpcy => id_mvl4; id_akl9*id_dpcy*id_2klh;
  id_e1hx: id_mvl4 => id_dpcy; id_j382*id_mvl4*id_akl9;
  id_zc2f: id_kbri => ; id_akl9*id_kbri*id_wmo5;
  id_1rmm: => id_k4hs; id_akl9*(id_d7ie/(1 + id_kbri^3));  // modifiers: id_kbri

  // Unit definitions:
  unit id_l1oz = 3600 second;
end
